*Heading
** PARTS
**
*Part, name=crank
*Node
      1, -0.00999999978, 0.0199999996,           0.
      2,           0., 0.0199999996,           0.
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*Element, type=C3D20
1,  41,  84,  85,  40,   1,  36,  37,   4, 115, 114, 113, 112, 116, 117, 118,
   119, 121, 120, 122, 123
2,  84,  43,  42,  85,  36,   2,   3,  37, 126, 125, 124, 114, 127, 128, 129,
   117, 120, 130, 131, 122
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*Nset, nset=_PickedSet4, internal, generate
   1,  665,    1
*Elset, elset=_PickedSet4, internal, generate
   1,  104,    1
** Section: section_homo_solid
*Solid Section, elset=_PickedSet4, material=steel
,
*End Part
** ASSEMBLY
**
*Assembly, name=Assembly
**
*Instance, name=Instance, part=crank
*End Instance
**
*End Assembly
**
** MATERIALS
**
*Material, name=steel
*Density
7850.,
*Elastic
 2.1e+11, 0.3
** STEP
*step, name=step_matrix_generate_crank
*MATRIX GENERATE, MASS, STIFFNESS
*MATRIX OUTPUT, MASS, STIFFNESS, FORMAT=COORDINATE
*END STEP
