*Heading
** Job name: blockC3D20R Model name: Model-1
** Generated by: Abaqus/CAE 2021
*Preprint, echo=NO, model=NO, history=NO, contact=NO
**
** PARTS
**
*Part, name=block
*End Part
**
**
** ASSEMBLY
**
*Assembly, name=Assembly
**
*Instance, name=block-1, part=block
*Node
      1,           4.,           1.,           1.
      2,           4.,          0.5,           1.
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*Element, type=C3D20R
 1,  10,  11,  14,  13,   1,   2,   5,   4,  58,  57,  56,  55,  59,  60,  61,
     62,  64,  63,  65,  66
 2,  11,  12,  15,  14,   2,   3,   6,   5,  69,  68,  67,  57,  70,  71,  72,
     60,  63,  73,  74,  65
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*Nset, nset=Set-1, generate
   1,  171,    1
*Elset, elset=Set-1, generate
  1,  20,   1
** Section: Section-1
*Solid Section, elset=Set-1, material=steel
,
*End Instance
**
*End Assembly
**
** MATERIALS
**
*Material, name=steel
*Density
2900.,
*Elastic
 2e+11, 0.3
*Step, name=Step-2, nlgeom=NO
** modified Inputfile -> Export MASS and STIFFNESS matrices
** for export a consistent mass matrix MASS=CONSISTENT for lumped only MASS
*MATRIX GENERATE, STIFFNESS, MASS
*MATRIX OUTPUT, STIFFNESS, MASS, FORMAT=COORDINATE
*End Step
