*Heading
** Job name: eigenvalues_rotorDisc Model name: Model-1
** Generated by: Abaqus/CAE 2019
*Preprint, echo=NO, model=NO, history=NO, contact=NO
**
** PARTS
**
*Part, name=rotor
*End Part
**
**
** ASSEMBLY
**
*Assembly, name=Assembly
**
*Instance, name=rotor-1, part=rotor
*Node
      1,           0., -0.195984438,  0.150000006
      2,           0., -0.0500000007,  0.150000006
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*Element, type=C3D8
1, 8, 5, 6, 7, 1, 2, 3, 4
2, 16, 13, 14, 15,  9, 10, 11, 12
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*Nset, nset=Set-1, generate
   1,  115,    1
*Elset, elset=Set-1, generate
  1,  48,   1
** Section: rotor
*Solid Section, elset=Set-1, material=steel
,
*End Instance
**
*Nset, nset=BCleft, instance=rotor-1
 78,
*Nset, nset=BCright, instance=rotor-1
 77,
*Nset, nset=BCrot, instance=rotor-1
 43,
*Nset, nset=NodeMiddle, instance=rotor-1
 111,
*Elset, elset=_Surface_S1, internal, instance=rotor-1
  1,  2,  3,  4,  5,  6,  7,  8, 45, 46, 47, 48
*Elset, elset=_Surface_S2, internal, instance=rotor-1, generate
  1,  12,   1
*Elset, elset=_Surface_S6, internal, instance=rotor-1
  1,  3,  9, 11, 13, 15
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*Elset, elset=_Surface_S4, internal, instance=rotor-1
  2,  4,  5,  6,  7,  8
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*Elset, elset=_Surface_S3, internal, instance=rotor-1
  9, 10, 13, 14, 17, 18
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*Elset, elset=_Surface_S5, internal, instance=rotor-1
 11, 12, 15, 16, 19, 20
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*Surface, type=ELEMENT, name=Surface
_Surface_S1, S1
_Surface_S2, S2
_Surface_S6, S6
_Surface_S4, S4
_Surface_S3, S3
_Surface_S5, S5
*End Assembly
**
** MATERIALS
**
*Material, name=steel
*Density
7850.,
*Elastic
 2.1e+11, 0.3
** ----------------------------------------------------------------
** modified Inputfile -> Export MASS and STIFFNESS matrices
*STEP
*MATRIX GENERATE, STIFFNESS, MASS
*MATRIX OUTPUT, STIFFNESS, MASS, FORMAT=COORDINATE
*End Step
